x := [1; 1; -1; 1; 1; -1; -1; -1]
H := [
    -1, 1, 1, -1, 1, 1, -1, -1;
    -1, -1, 1, 1, -1, 1, 1, -1;
    -1, -1, -1, 1, 1, -1, 1, 1;
    1, -1, -1, -1, 1, 1, -1, 1;
    1, 1, -1, -1, -1, 1, 1, -1;
    -1, 1, 1, -1, -1, -1, 1, 1;
    1, -1, 1, 1, -1, -1, -1, 1;
    1, 1, -1, 1, 1, -1, -1, -1
]
Y := H*x
b := [1; 2; 3; 4; 5; 6; 7; 8]
Y = [0; -4; 0; 0; 0; -4; 0; 8]
# [plot: Y vs b]
N := 8
x := [1; 1; -1; 1; 1; -1; -1; -1]
H := [
    -1, -1, -1, 1, 1, -1, 1, 1;
    -1, -1, 1, 1, -1, 1, 1, -1;
    -1, 1, 1, -1, 1, 1, -1, -1;
    1, 1, -1, 1, 1, -1, -1, -1;
    1, -1, 1, 1, -1, -1, -1, 1;
    -1, 1, 1, -1, -1, -1, 1, 1;
    1, 1, -1, -1, -1, 1, 1, -1;
    1, -1, -1, -1, 1, 1, -1, -1
]
R := 1/N*H*x
R = [0; -0.5; 0; 1; 0; -0.5; 0; 0.25]
# [plot: R vs b]
x(n) := [1, 1, -1, 1, 1, -1, -1, -1]
x(n) =  # error: Эта переменная не определена. Проверьте правильность установки обозначения.
N := 8
n := 0, 1 .. N - 1
n = [0; 1; 2; 3; 4; 5; 6; 7]
r(n) := 1/N*sum(x(m)*x(n + m)^mod(N), m = 0 .. N - 1)
r(x) =  # error: Значение должно быть скаляром или матрицей.
